// SBML level 2 version 3

model GPGeneratedModel()

  // Species:
  substanceOnly species ERK in compartment = 0.025;
  substanceOnly species ERKPP in compartment = 0;
  substanceOnly species ERKPP|ERK in compartment = 0;
  substanceOnly species ERKPP|MEKPP in compartment = 0;
  substanceOnly species ERKPP|MEKPP|ERK in compartment = 0;
  substanceOnly species ERKPP|RKIP in compartment = 0;
  substanceOnly species ERKPP|RKIPP in compartment = 0;
  substanceOnly species ERKPP|RP in compartment = 0;
  substanceOnly species ERKPP|RP|RKIPP in compartment = 0;
  substanceOnly species ERKPP|Raf1Star in compartment = 0;
  substanceOnly species ERKPP|Raf1Star|RKIP in compartment = 0;
  substanceOnly species ERKPP|Raf1Star|RKIP|ERKPP in compartment = 0;
  substanceOnly species ERK|ERKPP in compartment = 0;
  substanceOnly species ERK|MEKPP in compartment = 0;
  substanceOnly species ERK|MEKPP|ERK in compartment = 0;
  substanceOnly species ERK|RKIP in compartment = 0;
  substanceOnly species ERK|RKIPP in compartment = 0;
  substanceOnly species ERK|RP in compartment = 0;
  substanceOnly species ERK|RP|RKIPP in compartment = 0;
  substanceOnly species ERK|Raf1Star in compartment = 0;
  substanceOnly species ERK|Raf1Star|RKIP in compartment = 0;
  substanceOnly species ERK|Raf1Star|RKIP|ERKPP in compartment = 0;
  substanceOnly species MEKPP in compartment = 0.025;
  substanceOnly species MEKPP|ERK in compartment = 0;
  substanceOnly species MEKPP|ERKPP in compartment = 0;
  substanceOnly species MEKPP|ERK|ERK in compartment = 0;
  substanceOnly species MEKPP|ERK|ERKPP in compartment = 0;
  substanceOnly species MEKPP|ERK|MEKPP in compartment = 0;
  substanceOnly species MEKPP|ERK|RKIP in compartment = 0;
  substanceOnly species MEKPP|ERK|RKIPP in compartment = 0;
  substanceOnly species MEKPP|ERK|RP in compartment = 0;
  substanceOnly species MEKPP|ERK|RP|RKIPP in compartment = 0;
  substanceOnly species MEKPP|ERK|Raf1Star in compartment = 0;
  substanceOnly species MEKPP|ERK|Raf1Star|RKIP in compartment = 0;
  substanceOnly species MEKPP|ERK|Raf1Star|RKIP|ERKPP in compartment = 0;
  substanceOnly species MEKPP|MEKPP|ERK in compartment = 0;
  substanceOnly species MEKPP|RKIP in compartment = 0;
  substanceOnly species MEKPP|RKIPP in compartment = 0;
  substanceOnly species MEKPP|RP in compartment = 0;
  substanceOnly species MEKPP|RP|RKIPP in compartment = 0;
  substanceOnly species MEKPP|Raf1Star in compartment = 0;
  substanceOnly species MEKPP|Raf1Star|RKIP in compartment = 0;
  substanceOnly species MEKPP|Raf1Star|RKIP|ERKPP in compartment = 0;
  substanceOnly species RKIP in compartment = 0.025;
  substanceOnly species RKIPP in compartment = 0;
  substanceOnly species RKIPP|ERK in compartment = 0;
  substanceOnly species RKIPP|ERKPP in compartment = 0;
  substanceOnly species RKIPP|MEKPP in compartment = 0;
  substanceOnly species RKIPP|MEKPP|ERK in compartment = 0;
  substanceOnly species RKIPP|RKIP in compartment = 0;
  substanceOnly species RKIPP|RP in compartment = 0;
  substanceOnly species RKIPP|RP|RKIPP in compartment = 0;
  substanceOnly species RKIPP|Raf1Star in compartment = 0;
  substanceOnly species RKIPP|Raf1Star|RKIP in compartment = 0;
  substanceOnly species RKIPP|Raf1Star|RKIP|ERKPP in compartment = 0;
  substanceOnly species RKIP|ERK in compartment = 0;
  substanceOnly species RKIP|ERKPP in compartment = 0;
  substanceOnly species RKIP|MEKPP in compartment = 0;
  substanceOnly species RKIP|MEKPP|ERK in compartment = 0;
  substanceOnly species RKIP|RKIPP in compartment = 0;
  substanceOnly species RKIP|RP in compartment = 0;
  substanceOnly species RKIP|RP|RKIPP in compartment = 0;
  substanceOnly species RKIP|Raf1Star in compartment = 0;
  substanceOnly species RKIP|Raf1Star|RKIP in compartment = 0;
  substanceOnly species RKIP|Raf1Star|RKIP|ERKPP in compartment = 0;
  substanceOnly species RP in compartment = 0.03;
  substanceOnly species RP|ERK in compartment = 0;
  substanceOnly species RP|ERKPP in compartment = 0;
  substanceOnly species RP|MEKPP in compartment = 0;
  substanceOnly species RP|MEKPP|ERK in compartment = 0;
  substanceOnly species RP|RKIP in compartment = 0;
  substanceOnly species RP|RKIPP in compartment = 0;
  substanceOnly species RP|RKIPP|ERK in compartment = 0;
  substanceOnly species RP|RKIPP|ERKPP in compartment = 0;
  substanceOnly species RP|RKIPP|MEKPP in compartment = 0;
  substanceOnly species RP|RKIPP|MEKPP|ERK in compartment = 0;
  substanceOnly species RP|RKIPP|RKIP in compartment = 0;
  substanceOnly species RP|RKIPP|RKIPP in compartment = 0;
  substanceOnly species RP|RKIPP|RP in compartment = 0;
  substanceOnly species RP|RKIPP|Raf1Star in compartment = 0;
  substanceOnly species RP|RKIPP|Raf1Star|RKIP in compartment = 0;
  substanceOnly species RP|RKIPP|Raf1Star|RKIP|ERKPP in compartment = 0;
  substanceOnly species RP|RP|RKIPP in compartment = 0;
  substanceOnly species RP|Raf1Star in compartment = 0;
  substanceOnly species RP|Raf1Star|RKIP in compartment = 0;
  substanceOnly species RP|Raf1Star|RKIP|ERKPP in compartment = 0;
  substanceOnly species Raf1Star in compartment = 0.025;
  substanceOnly species Raf1Star|ERK in compartment = 0;
  substanceOnly species Raf1Star|ERKPP in compartment = 0;
  substanceOnly species Raf1Star|MEKPP in compartment = 0;
  substanceOnly species Raf1Star|MEKPP|ERK in compartment = 0;
  substanceOnly species Raf1Star|RKIP in compartment = 0;
  substanceOnly species Raf1Star|RKIPP in compartment = 0;
  substanceOnly species Raf1Star|RKIP|ERK in compartment = 0;
  substanceOnly species Raf1Star|RKIP|ERKPP in compartment = 0;
  substanceOnly species Raf1Star|RKIP|ERKPP|ERK in compartment = 0;
  substanceOnly species Raf1Star|RKIP|ERKPP|ERKPP in compartment = 0;
  substanceOnly species Raf1Star|RKIP|ERKPP|MEKPP in compartment = 0;
  substanceOnly species Raf1Star|RKIP|ERKPP|MEKPP|ERK in compartment = 0;
  substanceOnly species Raf1Star|RKIP|ERKPP|RKIP in compartment = 0;
  substanceOnly species Raf1Star|RKIP|ERKPP|RKIPP in compartment = 0;
  substanceOnly species Raf1Star|RKIP|ERKPP|RP in compartment = 0;
  substanceOnly species Raf1Star|RKIP|ERKPP|RP|RKIPP in compartment = 0;
  substanceOnly species Raf1Star|RKIP|ERKPP|Raf1Star in compartment = 0;
  substanceOnly species Raf1Star|RKIP|ERKPP|Raf1Star|RKIP in compartment = 0;
  substanceOnly species Raf1Star|RKIP|MEKPP in compartment = 0;
  substanceOnly species Raf1Star|RKIP|MEKPP|ERK in compartment = 0;
  substanceOnly species Raf1Star|RKIP|RKIP in compartment = 0;
  substanceOnly species Raf1Star|RKIP|RKIPP in compartment = 0;
  substanceOnly species Raf1Star|RKIP|RP in compartment = 0;
  substanceOnly species Raf1Star|RKIP|RP|RKIPP in compartment = 0;
  substanceOnly species Raf1Star|RKIP|Raf1Star in compartment = 0;
  substanceOnly species Raf1Star|RKIP|Raf1Star|RKIP|ERKPP in compartment = 0;
  substanceOnly species Raf1Star|RP in compartment = 0;
  substanceOnly species Raf1Star|RP|RKIPP in compartment = 0;
  substanceOnly species Raf1Star|Raf1Star|RKIP in compartment = 0;
  substanceOnly species Raf1Star|Raf1Star|RKIP|ERKPP in compartment = 0;

  // Parameters:
  k0 = 0.4934543;
  k1 = 0.7781176;
  k2 = 0.3731693;
  k3 = 0.5208226;
  k4 = 0.03480006;
  k5 = 0.0009830599;
  k6 = 0.5947438;
  k7 = 0.951156;
  k8 = 0.5349518;
  k9 = 0.2602625;
  k10 = 0.006397711;
  k11 = 0.1553574;
  k12 = 0.4552655;
  k13 = 0.06634574;
  k14 = 0.2458607;
  k15 = 0.7926228;
  k16 = 0.04746051;
  k17 = 0.1877604;
  k18 = 0.01549668;
  k19 = 0.4823196;
  k20 = 0.9999521;
  k21 = 0.8238807;
  k22 = 0.3321621;
  k23 = 0.888278;
  k24 = 0.8230171;
  k25 = 0.1836792;
  k26 = 0.7377078;
  k27 = 0.0532156;
  k28 = 0.3459642;
  k29 = 0.1662845;
  k30 = 0.7787709;
  k31 = 0.5076578;
  k32 = 0.9567673;
  k33 = 0.8283799;
  k34 = 0.437122;
  k35 = 0.8206454;
  k36 = 0.07722391;
  k37 = 0.6177567;
  k38 = 0.1435098;
  k39 = 0.4713685;
  k40 = 0.2796811;
  k41 = 0.9720397;
  k42 = 0.2564354;
  k43 = 0.3262966;
  k44 = 0.01327271;
  k45 = 0.804423;
  k46 = 0.6789141;
  k47 = 0.890983;
  k48 = 0.13812;
  k49 = 0.613886;
  k50 = 0.9733845;
  k51 = 0.5727018;
  k52 = 0.4460962;
  k53 = 0.08512342;
  k54 = 0.2132226;
  k55 = 0.6022498;
  k56 = 0.9219134;
  k57 = 0.1021331;
  k58 = 0.6871871;
  k59 = 0.4813488;
  k60 = 0.02203093;
  k61 = 0.6326842;
  k62 = 0.902026;
  k63 = 0.6335871;
  k64 = 0.7434188;
  k65 = 0.7765237;
  k66 = 0.1075564;
  k67 = 0.7298421;
  k68 = 0.9262367;
  k69 = 0.9812825;
  k70 = 0.4961627;
  k71 = 0.4316086;
  k72 = 0.8850061;
  k73 = 0.9112563;
  k74 = 0.4431432;
  k75 = 0.2116754;
  k76 = 0.2258499;
  k77 = 0.1802032;
  k78 = 0.1495252;
  k79 = 0.8631915;
  k80 = 0.9101231;
  k81 = 0.2218269;
  k82 = 0.9300864;
  k83 = 0.4718085;
  k84 = 0.9088023;
  k85 = 0.9557495;
  k86 = 0.1571676;
  k87 = 0.6288659;
  k88 = 0.7170167;
  k89 = 0.4983654;
  k90 = 0.5598404;
  k91 = 0.9729828;
  k92 = 0.9093422;
  k93 = 0.9954285;
  k94 = 0.00128717;
  k95 = 0.7062346;
  k96 = 0.136525;
  k97 = 0.01709684;
  k98 = 0.982055;
  k99 = 0.3022855;
  k100 = 0.5295164;
  k101 = 0.2302709;
  k102 = 0.0400452;
  k103 = 0.7606472;
  k104 = 0.6554218;
  k105 = 0.6729486;
  k106 = 0.5876402;
  k107 = 0.8092693;
  k108 = 0.8452066;
  k109 = 0.5258831;
  k110 = 0.7179831;
  k111 = 0.5130268;
  k112 = 0.03642302;
  k113 = 0.07431499;
  k114 = 0.8418571;
  k115 = 0.09253139;
  k116 = 0.4228552;
  k117 = 0.9389712;
  k118 = 0.7890929;
  k119 = 0.934679;
  k120 = 0.2630503;
  k121 = 0.4822798;
  k122 = 0.08738947;
  k123 = 0.9224248;
  k124 = 0.5115663;
  k125 = 0.6714756;
  k126 = 0.3369869;
  k127 = 0.2672161;
  k128 = 0.7247509;
  k129 = 0.5491865;
  k130 = 0.4710624;
  k131 = 0.3733138;
  k132 = 0.8935283;
  k133 = 0.644017;
  k134 = 0.01619742;
  k135 = 0.5941206;
  k136 = 0.1094167;
  k137 = 0.1959357;
  k138 = 0.3828307;
  k139 = 0.2029389;
  k140 = 0.8661079;
  k141 = 0.7211884;
  k142 = 0.1563499;
  k143 = 0.637839;
  k144 = 0.2503856;
  k145 = 0.6475887;
  k146 = 0.2729621;
  k147 = 0.8288816;
  k148 = 0.1926716;
  k149 = 0.5787321;
  k150 = 0.1321238;
  k151 = 0.5187274;
  k152 = 0.1851422;
  k153 = 0.1973593;
  k154 = 0.2209997;
  k155 = 0.9616033;
  k156 = 0.4113798;
  k157 = 0.2128874;
  k158 = 0.677992;
  k159 = 0.7057041;
  k160 = 0.6023513;
  k161 = 0.9091461;
  k162 = 0.6193428;
  k163 = 0.6848349;
  k164 = 0.1328013;
  k165 = 0.6837427;
  k166 = 0.3020983;
  k167 = 0.5117546;
  k168 = 0.1222342;
  k169 = 0.5780285;
  k170 = 0.9174636;
  k171 = 0.1121504;
  k172 = 0.2925031;
  k173 = 0.75095;
  k174 = 0.4183471;
  k175 = 0.7111161;
  k176 = 0.7161543;
  k177 = 0.6595877;
  k178 = 0.4457848;
  k179 = 0.08273131;
  k180 = 0.02046168;
  k181 = 0.3988693;
  k182 = 0.7750194;
  k183 = 0.6544822;
  k184 = 0.2976707;
  k185 = 0.007827507;
  k186 = 0.831691;
  k187 = 0.07754738;
  k188 = 0.4486194;
  k189 = 0.8996585;
  k190 = 0.9160305;
  k191 = 0.9595294;
  k192 = 0.6327573;
  k193 = 0.2243548;
  k194 = 0.9249392;
  k195 = 0.2603303;
  k196 = 0.9848442;
  k197 = 0.9692438;
  k198 = 0.1746575;
  k199 = 0.706851;
  k200 = 0.2743344;
  k201 = 0.8615702;
  k202 = 0.7210388;
  k203 = 0.8236832;
  k204 = 0.2008424;
  k205 = 0.3862735;
  k206 = 0.878469;
  k207 = 0.9204917;
  k208 = 0.5171338;
  k209 = 0.4411841;
  k210 = 0.8381023;
  k211 = 0.1699661;
  k212 = 0.7070539;
  k213 = 0.9182242;
  k214 = 0.8102378;
  k215 = 0.5210091;
  k216 = 0.4960838;
  k217 = 0.830161;
  k218 = 0.3742849;
  k219 = 0.09873865;
  k220 = 0.04378393;
  k221 = 0.5503033;
  k222 = 0.4001996;
  k223 = 0.1938697;
  k224 = 0.3979862;
  k225 = 0.7800298;
  k226 = 0.7561156;
  k227 = 0.3247976;
  k228 = 0.2989046;
  k229 = 0.6544565;
  k230 = 0.9945267;
  k231 = 0.5400576;
  k232 = 0.8778796;
  k233 = 0.9529807;
  k234 = 0.603473;
  k235 = 0.9950149;
  k236 = 0.7457931;
  k237 = 0.6825869;
  k238 = 0.6464854;
  k239 = 0.04394768;
  k240 = 0.1631847;
  k241 = 0.1496413;
  k242 = 0.4376686;
  k243 = 0.5887503;
  k244 = 0.9942109;
  k245 = 0.2805019;
  k246 = 0.9144367;
  k247 = 0.10687;
  k248 = 0.7147845;
  k249 = 0.259725;
  k250 = 0.7513826;
  k251 = 0.6974322;
  k252 = 0.4993213;
  k253 = 0.725845;
  k254 = 0.1394728;
  k255 = 0.1152466;
  k256 = 0.02294374;
  k257 = 0.4842327;
  k258 = 0.792983;
  k259 = 0.8120785;
  k260 = 0.9897235;
  k261 = 0.3109175;
  k262 = 0.8531802;
  k263 = 0.1247927;
  k264 = 0.3765434;
  k265 = 0.02292168;
  k266 = 0.8045664;
  k267 = 0.4635006;
  k268 = 0.8439745;
  k269 = 0.7211247;
  k270 = 0.7787026;
  k271 = 0.0550718;
  k272 = 0.7126991;
  k273 = 0.8714437;
  k274 = 0.6550137;
  k275 = 0.9277216;
  k276 = 0.6222149;
  k277 = 0.5429782;
  k278 = 0.01490554;
  k279 = 0.4837673;
  k280 = 0.225024;
  k281 = 0.4505014;
  k282 = 0.9511604;
  k283 = 0.6217618;
  k284 = 0.704141;
  k285 = 0.9935513;
  k286 = 0.4588089;
  k287 = 0.5841435;
  k288 = 0.6351605;
  k289 = 0.7655181;
  k290 = 0.6450052;
  k291 = 0.9307097;
  k292 = 0.7709156;
  k293 = 0.9778412;
  k294 = 0.9059141;
  k295 = 0.2067876;
  k296 = 0.1746004;
  k297 = 0.9602335;
  k298 = 0.6054452;
  k299 = 0.2254508;
  k300 = 0.8286705;
  k301 = 0.4432478;
  k302 = 0.8755919;
  k303 = 0.6283855;
  k304 = 0.06836343;
  k305 = 0.4366166;
  k306 = 0.02632888;
  k307 = 0.3337515;
  k308 = 0.7634235;
  k309 = 0.4145513;
  k310 = 0.2904323;
  k311 = 0.8856438;
  k312 = 0.3493008;
  k313 = 0.005256249;
  k314 = 0.9307994;
  k315 = 0.8783812;
  k316 = 0.9296273;
  k317 = 0.3096994;
  k318 = 0.8666361;
  k319 = 0.5366584;
  k320 = 0.8622104;
  k321 = 0.3289329;
  k322 = 0.2266578;
  k323 = 0.9458481;
  k324 = 0.290694;
  k325 = 0.3765434;
  k326 = 0.9140087;
  k327 = 0.5450083;
  k328 = 0.7441797;
  k329 = 0.07273175;
  k330 = 0.4080555;
  k331 = 0.5751252;
  k332 = 0.163817;
  k333 = 0.9706286;
  k334 = 0.5831807;
  k335 = 0.5554763;
  k336 = 0.7757129;
  k337 = 0.9899773;
  k338 = 0.9697678;
  k339 = 0.1009107;
  k340 = 0.6830602;
  k341 = 0.9370636;
  k342 = 0.4383417;
  k343 = 0.8177606;
  k344 = 0.3550575;
  k345 = 0.7664101;
  k346 = 0.6763608;
  k347 = 0.856448;
  k348 = 0.5153927;
  k349 = 0.323093;
  k350 = 0.07714515;
  k351 = 0.6872268;
  k352 = 0.8561597;
  k353 = 0.9924247;
  k354 = 0.6672001;
  k355 = 0.08756794;
  k356 = 0.8206078;
  k357 = 0.6989973;
  k358 = 0.6765085;
  k359 = 0.2939631;
  k360 = 0.2054725;
  k361 = 0.7220768;
  k362 = 0.4576328;
  k363 = 0.7233762;
  k364 = 0.8019585;
  k365 = 0.7215135;
  k366 = 0.2189024;
  k367 = 0.3641101;
  k368 = 0.9606225;
  k369 = 0.388579;
  k370 = 0.7984772;
  k371 = 0.01587003;
  k372 = 0.5336159;
  k373 = 0.1303729;
  k374 = 0.1563382;
  k375 = 0.2670148;
  k376 = 0.3476577;
  k377 = 0.5626008;
  k378 = 0.2808273;
  k379 = 0.6260696;
  k380 = 0.3773076;
  k381 = 0.1507356;
  k382 = 0.7755693;
  k383 = 0.2206781;
  k384 = 0.7508591;
  k385 = 0.465327;
  k386 = 0.5114207;
  k387 = 0.8112421;
  k388 = 0.9073559;
  k389 = 0.6536122;
  k390 = 0.219697;
  k391 = 0.1247689;
  k392 = 0.7002682;
  k393 = 0.07036169;
  k394 = 0.5769494;
  k395 = 0.5668436;
  k396 = 0.5742467;
  k397 = 0.416844;
  k398 = 0.9374095;
  k399 = 0.3872488;
  k400 = 0.005120489;
  k401 = 0.8327581;
  k402 = 0.8719507;
  k403 = 0.01761583;
  k404 = 0.9823076;
  k405 = 0.6537752;
  k406 = 0.9439237;
  k407 = 0.2749993;
  k408 = 0.3273771;
  k409 = 0.9511743;
  k410 = 0.2779123;
  k411 = 0.4485694;
  k412 = 0.6421719;
  k413 = 0.712237;
  k414 = 0.2671594;
  k415 = 0.5440946;
  k416 = 0.704551;
  k417 = 0.293436;
  k418 = 0.4766514;
  k419 = 0.7220063;
  k420 = 0.06558201;
  k421 = 0.366248;
  k422 = 0.5967928;
  k423 = 0.8863232;
  k424 = 0.2503393;
  k425 = 0.7939803;
  k426 = 0.01349635;
  k427 = 0.8823685;
  k428 = 0.9944133;
  k429 = 0.9867921;
  k430 = 0.8668397;
  k431 = 0.9749878;
  k432 = 0.7663805;
  k433 = 0.07082128;
  k434 = 0.1237793;
  k435 = 0.4500356;
  k436 = 0.3351041;
  k437 = 0.8633508;
  k438 = 0.6470065;
  k439 = 0.3041193;
  k440 = 0.712333;
  k441 = 0.09412797;
  k442 = 0.9018731;
  k443 = 0.6215209;
  k444 = 0.6707691;
  k445 = 0.9880751;
  k446 = 0.3847285;
  k447 = 0.4543995;
  k448 = 0.432683;
  k449 = 0.4911422;
  k450 = 0.5299798;
  k451 = 0.4243101;
  k452 = 0.09202482;
  k453 = 0.4787508;
  k454 = 0.5626674;
  k455 = 0.1355396;
  k456 = 0.5862177;
  k457 = 0.2065618;
  k458 = 0.1800048;
  k459 = 0.8155173;
  k460 = 0.2199138;
  k461 = 0.9006697;
  k462 = 0.1148372;
  k463 = 0.7178489;
  k464 = 0.915696;
  k465 = 0.782405;
  k466 = 0.6917802;
  k467 = 0.7695897;
  k468 = 0.1814747;
  k469 = 0.9563486;
  k470 = 0.4616533;
  k471 = 0.4423866;
  k472 = 0.2028329;
  k473 = 0.2743854;
  k474 = 0.0902527;
  k475 = 0.7584506;
  k476 = 0.7356445;
  k477 = 0.6744113;
  k478 = 0.6615406;
  k479 = 0.319813;
  k480 = 0.7884043;
  k481 = 0.4135518;
  k482 = 0.9813888;
  k483 = 0.8801042;
  k484 = 0.5622593;
  k485 = 0.2682921;
  k486 = 0.9708029;
  k487 = 0.5402079;
  k488 = 0.1044389;
  k489 = 0.2860064;
  k490 = 0.0665234;
  k491 = 0.703895;
  k492 = 0.3690904;
  k493 = 0.4104672;
  k494 = 0.2278104;
  k495 = 0.07435672;
  k496 = 0.3829532;
  k497 = 0.8068736;
  k498 = 0.353501;
  k499 = 0.3905131;
  k500 = 0.6472033;
  k501 = 0.05462886;
  k502 = 0.9177032;
  k503 = 0.04412594;
  k504 = 0.1919073;
  k505 = 0.7605522;
  k506 = 0.07564406;
  k507 = 0.4126838;
  k508 = 0.3058085;

  // Reactions:
  r0: MEKPP|MEKPP|ERK => Raf1Star|RKIP|ERKPP|MEKPP|ERK; k0*MEKPP|MEKPP|ERK;
  r1: MEKPP|ERK|RP|RKIPP => RKIPP|RP|RKIPP; k1*MEKPP|ERK|RP|RKIPP;
  r2: Raf1Star|RP|RKIPP => RKIP|RP|RKIPP; k2*Raf1Star|RP|RKIPP;
  r3: RP|MEKPP => RP + MEKPP; k3*RP|MEKPP;
  r4: RP|ERKPP => RP + ERKPP; k4*RP|ERKPP;
  r5: RP|Raf1Star|RKIP|ERKPP => RKIP|Raf1Star|RKIP|ERKPP; k5*RP|Raf1Star|RKIP|ERKPP;
  r6: RKIPP + ERKPP => RKIPP|ERKPP; k6*RKIPP*ERKPP;
  r7: MEKPP|ERK|RKIP => RP|RKIP; k7*MEKPP|ERK|RKIP;
  r8: RKIPP|ERKPP => RP|RKIPP|ERKPP; k8*RKIPP|ERKPP;
  r9: RKIPP|MEKPP => RP|RKIPP|MEKPP; k9*RKIPP|MEKPP;
  r10: Raf1Star|RKIP|ERKPP|RP => MEKPP|ERK|RP; k10*Raf1Star|RKIP|ERKPP|RP;
  r11: RKIP|RP => Raf1Star|RKIP|RP; k11*RKIP|RP;
  r12: RKIPP|Raf1Star|RKIP|ERKPP => MEKPP|Raf1Star|RKIP|ERKPP; k12*RKIPP|Raf1Star|RKIP|ERKPP;
  r13: RP|RKIPP|Raf1Star => RKIPP|Raf1Star; k13*RP|RKIPP|Raf1Star;
  r14: Raf1Star|RKIP|ERKPP|Raf1Star => ERKPP|Raf1Star; k14*Raf1Star|RKIP|ERKPP|Raf1Star;
  r15: RKIPP|Raf1Star|RKIP => MEKPP|Raf1Star|RKIP; k15*RKIPP|Raf1Star|RKIP;
  r16: MEKPP|ERK|Raf1Star|RKIP|ERKPP => MEKPP|ERK + Raf1Star|RKIP|ERKPP; k16*MEKPP|ERK|Raf1Star|RKIP|ERKPP;
  r17: RP|ERKPP => MEKPP|ERK|ERKPP; k17*RP|ERKPP;
  r18: RP|MEKPP => ERKPP|MEKPP; k18*RP|MEKPP;
  r19: RKIPP|RKIP => MEKPP|RKIP; k19*RKIPP|RKIP;
  r20: ERKPP|Raf1Star|RKIP|ERKPP => ERKPP + Raf1Star|RKIP|ERKPP; k20*ERKPP|Raf1Star|RKIP|ERKPP;
  r21: ERK|MEKPP|ERK => ERK + MEKPP|ERK; k21*ERK|MEKPP|ERK;
  r22: Raf1Star|Raf1Star|RKIP|ERKPP => RP|RKIPP|Raf1Star|RKIP|ERKPP; k22*Raf1Star|Raf1Star|RKIP|ERKPP;
  r23: Raf1Star|ERKPP => Raf1Star|RKIP|ERKPP|ERKPP; k23*Raf1Star|ERKPP;
  r24: Raf1Star|MEKPP => Raf1Star|RKIP|ERKPP|MEKPP; k24*Raf1Star|MEKPP;
  r25: Raf1Star|RP => Raf1Star|RKIP|RP; k25*Raf1Star|RP;
  r26: ERKPP|ERK => RP|ERK; k26*ERKPP|ERK;
  r27: ERKPP|MEKPP => ERKPP + MEKPP; k27*ERKPP|MEKPP;
  r28: RKIP|Raf1Star => Raf1Star|RKIP|ERKPP|Raf1Star; k28*RKIP|Raf1Star;
  r29: RKIP|RP|RKIPP => Raf1Star|RKIP|ERKPP|RP|RKIPP; k29*RKIP|RP|RKIPP;
  r30: RKIP|ERKPP => Raf1Star|RKIP|ERKPP; k30*RKIP|ERKPP;
  r31: RKIP|Raf1Star => RP|Raf1Star; k31*RKIP|Raf1Star;
  r32: RKIP|RP|RKIPP => RP|RP|RKIPP; k32*RKIP|RP|RKIPP;
  r33: Raf1Star|RKIP + Raf1Star|RKIP|ERKPP => Raf1Star|RKIP|Raf1Star|RKIP|ERKPP; k33*Raf1Star|RKIP*Raf1Star|RKIP|ERKPP;
  r34: MEKPP|RP|RKIPP => Raf1Star|RKIP|ERKPP|RP|RKIPP; k34*MEKPP|RP|RKIPP;
  r35: Raf1Star|RKIP|ERKPP|ERKPP => RKIP|ERKPP; k35*Raf1Star|RKIP|ERKPP|ERKPP;
  r36: ERK|RP => RP|RKIPP|RP; k36*ERK|RP;
  r37: Raf1Star + Raf1Star|RKIP => Raf1Star|Raf1Star|RKIP; k37*Raf1Star*Raf1Star|RKIP;
  r38: Raf1Star|RKIP + Raf1Star => Raf1Star|RKIP|Raf1Star; k38*Raf1Star|RKIP*Raf1Star;
  r39: ERKPP|ERK => RP|RKIPP|ERK; k39*ERKPP|ERK;
  r40: Raf1Star|Raf1Star|RKIP|ERKPP => Raf1Star + Raf1Star|RKIP|ERKPP; k40*Raf1Star|Raf1Star|RKIP|ERKPP;
  r41: RKIP + ERK => RKIP|ERK; k41*RKIP*ERK;
  r42: MEKPP|ERK|RP => Raf1Star|RP; k42*MEKPP|ERK|RP;
  r43: Raf1Star|RKIP|ERKPP|RKIPP => RP|RKIPP|RKIPP; k43*Raf1Star|RKIP|ERKPP|RKIPP;
  r44: RKIP|Raf1Star|RKIP|ERKPP => ERK|Raf1Star|RKIP|ERKPP; k44*RKIP|Raf1Star|RKIP|ERKPP;
  r45: RKIPP + MEKPP|ERK => RKIPP|MEKPP|ERK; k45*RKIPP*MEKPP|ERK;
  r46: MEKPP|ERK|RKIP => Raf1Star|RKIP; k46*MEKPP|ERK|RKIP;
  r47: ERK|RP|RKIPP => MEKPP|RP|RKIPP; k47*ERK|RP|RKIPP;
  r48: RKIPP|RP|RKIPP => ERK|RP|RKIPP; k48*RKIPP|RP|RKIPP;
  r49: ERK|Raf1Star => MEKPP|Raf1Star; k49*ERK|Raf1Star;
  r50: Raf1Star|Raf1Star|RKIP => RKIPP|Raf1Star|RKIP; k50*Raf1Star|Raf1Star|RKIP;
  r51: MEKPP|RKIP => RP|RKIP; k51*MEKPP|RKIP;
  r52: Raf1Star|RKIP|ERKPP|MEKPP|ERK => RKIPP|MEKPP|ERK; k52*Raf1Star|RKIP|ERKPP|MEKPP|ERK;
  r53: MEKPP|ERK|RP|RKIPP => ERKPP|RP|RKIPP; k53*MEKPP|ERK|RP|RKIPP;
  r54: Raf1Star|ERKPP => MEKPP|ERK|ERKPP; k54*Raf1Star|ERKPP;
  r55: MEKPP|ERK|Raf1Star => ERKPP|Raf1Star; k55*MEKPP|ERK|Raf1Star;
  r56: RP|RKIPP|MEKPP|ERK => RKIP|MEKPP|ERK; k56*RP|RKIPP|MEKPP|ERK;
  r57: RP|ERKPP => RP|RKIPP|ERKPP; k57*RP|ERKPP;
  r58: RKIPP|Raf1Star => ERKPP|Raf1Star; k58*RKIPP|Raf1Star;
  r59: RKIP + Raf1Star|RKIP => RKIP|Raf1Star|RKIP; k59*RKIP*Raf1Star|RKIP;
  r60: MEKPP|Raf1Star|RKIP|ERKPP => Raf1Star|RKIP|Raf1Star|RKIP|ERKPP; k60*MEKPP|Raf1Star|RKIP|ERKPP;
  r61: RKIP|MEKPP => RP|MEKPP; k61*RKIP|MEKPP;
  r62: RP|RKIPP|ERK => MEKPP|ERK|ERK; k62*RP|RKIPP|ERK;
  r63: Raf1Star|ERK => Raf1Star|RKIP|ERK; k63*Raf1Star|ERK;
  r64: Raf1Star|RKIP|MEKPP|ERK => RP|RKIPP|MEKPP|ERK; k64*Raf1Star|RKIP|MEKPP|ERK;
  r65: RKIPP|MEKPP|ERK => MEKPP|MEKPP|ERK; k65*RKIPP|MEKPP|ERK;
  r66: RKIPP|RP => RKIP|RP; k66*RKIPP|RP;
  r67: RKIP|Raf1Star|RKIP => RP|RKIPP|Raf1Star|RKIP; k67*RKIP|Raf1Star|RKIP;
  r68: RP|ERKPP => Raf1Star|RKIP|ERKPP; k68*RP|ERKPP;
  r69: ERK + RP => ERK|RP; k69*ERK*RP;
  r70: MEKPP|RP => Raf1Star|RKIP|ERKPP|RP; k70*MEKPP|RP;
  r71: MEKPP|ERK|Raf1Star|RKIP => RKIP|Raf1Star|RKIP; k71*MEKPP|ERK|Raf1Star|RKIP;
  r72: RP|MEKPP|ERK => RKIPP|MEKPP|ERK; k72*RP|MEKPP|ERK;
  r73: Raf1Star|RKIP|ERKPP + RKIPP => Raf1Star|RKIP|ERKPP|RKIPP; k73*Raf1Star|RKIP|ERKPP*RKIPP;
  r74: Raf1Star|RKIP|ERKPP + MEKPP => Raf1Star|RKIP|ERKPP|MEKPP; k74*Raf1Star|RKIP|ERKPP*MEKPP;
  r75: RKIPP|MEKPP => MEKPP|ERK|MEKPP; k75*RKIPP|MEKPP;
  r76: RP|Raf1Star|RKIP => Raf1Star|RKIP|ERKPP|Raf1Star|RKIP; k76*RP|Raf1Star|RKIP;
  r77: RP|RKIPP|Raf1Star|RKIP|ERKPP => RP|RKIPP + Raf1Star|RKIP|ERKPP; k77*RP|RKIPP|Raf1Star|RKIP|ERKPP;
  r78: RP|RKIPP|Raf1Star|RKIP|ERKPP => Raf1Star|RKIP|Raf1Star|RKIP|ERKPP; k78*RP|RKIPP|Raf1Star|RKIP|ERKPP;
  r79: RKIPP|ERKPP => Raf1Star|RKIP|ERKPP; k79*RKIPP|ERKPP;
  r80: Raf1Star|RKIP|ERKPP + ERK => Raf1Star|RKIP|ERKPP|ERK; k80*Raf1Star|RKIP|ERKPP*ERK;
  r81: MEKPP|ERK|RKIP => ERKPP|RKIP; k81*MEKPP|ERK|RKIP;
  r82: MEKPP|ERK|ERKPP => MEKPP|ERK + ERKPP; k82*MEKPP|ERK|ERKPP;
  r83: RKIPP|ERK => Raf1Star|ERK; k83*RKIPP|ERK;
  r84: RKIPP|ERK => RKIP|ERK; k84*RKIPP|ERK;
  r85: Raf1Star|RKIP|MEKPP => MEKPP|ERK|MEKPP; k85*Raf1Star|RKIP|MEKPP;
  r86: RP|RKIPP|RKIP => MEKPP|RKIP; k86*RP|RKIPP|RKIP;
  r87: ERK|MEKPP|ERK => Raf1Star|RKIP|ERKPP|MEKPP|ERK; k87*ERK|MEKPP|ERK;
  r88: RKIP|Raf1Star|RKIP => MEKPP|Raf1Star|RKIP; k88*RKIP|Raf1Star|RKIP;
  r89: RKIP|RP => Raf1Star|RKIP|ERKPP|RP; k89*RKIP|RP;
  r90: MEKPP|ERK|RP => ERKPP|RP; k90*MEKPP|ERK|RP;
  r91: Raf1Star|RKIP|ERKPP|RP => Raf1Star|RKIP|ERKPP + RP; k91*Raf1Star|RKIP|ERKPP|RP;
  r92: RKIP + RP => RKIP|RP; k92*RKIP*RP;
  r93: MEKPP|RP => MEKPP + RP; k93*MEKPP|RP;
  r94: RKIP|Raf1Star|RKIP|ERKPP => MEKPP|Raf1Star|RKIP|ERKPP; k94*RKIP|Raf1Star|RKIP|ERKPP;
  r95: RKIPP|MEKPP => ERK|MEKPP; k95*RKIPP|MEKPP;
  r96: RKIPP|ERKPP => ERK|ERKPP; k96*RKIPP|ERKPP;
  r97: RKIP|ERK => RP|ERK; k97*RKIP|ERK;
  r98: RKIP|Raf1Star|RKIP => RKIPP|Raf1Star|RKIP; k98*RKIP|Raf1Star|RKIP;
  r99: MEKPP|Raf1Star|RKIP|ERKPP => ERKPP|Raf1Star|RKIP|ERKPP; k99*MEKPP|Raf1Star|RKIP|ERKPP;
  r100: ERKPP|MEKPP|ERK => Raf1Star|MEKPP|ERK; k100*ERKPP|MEKPP|ERK;
  r101: Raf1Star|RKIP + ERKPP => Raf1Star|RKIP|ERKPP; k101*Raf1Star|RKIP*ERKPP;
  r102: ERK|Raf1Star|RKIP => MEKPP|ERK|Raf1Star|RKIP; k102*ERK|Raf1Star|RKIP;
  r103: Raf1Star|ERKPP => RKIPP|ERKPP; k103*Raf1Star|ERKPP;
  r104: MEKPP|RP|RKIPP => RKIPP|RP|RKIPP; k104*MEKPP|RP|RKIPP;
  r105: ERK|RKIP => RKIPP|RKIP; k105*ERK|RKIP;
  r106: RKIP|ERKPP => MEKPP|ERK|ERKPP; k106*RKIP|ERKPP;
  r107: RKIP|RKIPP => MEKPP|ERK|RKIPP; k107*RKIP|RKIPP;
  r108: Raf1Star|RKIPP => Raf1Star|RKIP|RKIPP; k108*Raf1Star|RKIPP;
  r109: Raf1Star|ERKPP => Raf1Star|RKIP|ERKPP; k109*Raf1Star|ERKPP;
  r110: Raf1Star|RKIP|RP|RKIPP => MEKPP|RP|RKIPP; k110*Raf1Star|RKIP|RP|RKIPP;
  r111: RP + ERK => RP|ERK; k111*RP*ERK;
  r112: ERK|Raf1Star|RKIP => Raf1Star|Raf1Star|RKIP; k112*ERK|Raf1Star|RKIP;
  r113: Raf1Star|RKIP|ERKPP|MEKPP => ERK|MEKPP; k113*Raf1Star|RKIP|ERKPP|MEKPP;
  r114: Raf1Star|RKIP|ERKPP|ERKPP => ERK|ERKPP; k114*Raf1Star|RKIP|ERKPP|ERKPP;
  r115: MEKPP|ERK|RP => RP|RKIPP|RP; k115*MEKPP|ERK|RP;
  r116: ERKPP|MEKPP|ERK => RKIP|MEKPP|ERK; k116*ERKPP|MEKPP|ERK;
  r117: RP|RKIPP|RP => Raf1Star|RKIP|ERKPP|RP; k117*RP|RKIPP|RP;
  r118: MEKPP|RKIP => Raf1Star|RKIP; k118*MEKPP|RKIP;
  r119: Raf1Star|RKIP|ERKPP|RKIP => ERK|RKIP; k119*Raf1Star|RKIP|ERKPP|RKIP;
  r120: MEKPP|MEKPP|ERK => MEKPP + MEKPP|ERK; k120*MEKPP|MEKPP|ERK;
  r121: RP|RKIPP|RKIPP => RP|RKIPP + RKIPP; k121*RP|RKIPP|RKIPP;
  r122: ERKPP|ERK => Raf1Star|RKIP|ERKPP|ERK; k122*ERKPP|ERK;
  r123: RKIP|ERK => Raf1Star|RKIP|ERK; k123*RKIP|ERK;
  r124: Raf1Star|ERK => RKIP|ERK; k124*Raf1Star|ERK;
  r125: Raf1Star|RKIP|ERKPP|MEKPP|ERK => Raf1Star|MEKPP|ERK; k125*Raf1Star|RKIP|ERKPP|MEKPP|ERK;
  r126: Raf1Star|RKIP|ERKPP|ERKPP => Raf1Star|RKIP|ERKPP; k126*Raf1Star|RKIP|ERKPP|ERKPP;
  r127: Raf1Star|RKIP|ERKPP|RKIPP => Raf1Star|RKIP|RKIPP; k127*Raf1Star|RKIP|ERKPP|RKIPP;
  r128: RKIPP + Raf1Star => RKIPP|Raf1Star; k128*RKIPP*Raf1Star;
  r129: MEKPP|ERK + ERK => MEKPP|ERK|ERK; k129*MEKPP|ERK*ERK;
  r130: RP|RKIPP|Raf1Star|RKIP => MEKPP|ERK|Raf1Star|RKIP; k130*RP|RKIPP|Raf1Star|RKIP;
  r131: RKIPP|ERK => MEKPP|ERK; k131*RKIPP|ERK;
  r132: ERK + RKIP => ERK|RKIP; k132*ERK*RKIP;
  r133: MEKPP|ERK|RKIP => RKIPP|RKIP; k133*MEKPP|ERK|RKIP;
  r134: Raf1Star|RKIP|ERKPP|RP|RKIPP => Raf1Star|RP|RKIPP; k134*Raf1Star|RKIP|ERKPP|RP|RKIPP;
  r135: RP|RKIPP|Raf1Star|RKIP => RP|RKIPP + Raf1Star|RKIP; k135*RP|RKIPP|Raf1Star|RKIP;
  r136: RP|RKIPP => ERK|RKIPP; k136*RP|RKIPP;
  r137: Raf1Star|RKIP|RKIP => Raf1Star|RKIP; k137*Raf1Star|RKIP|RKIP;
  r138: Raf1Star|ERKPP => MEKPP|ERKPP; k138*Raf1Star|ERKPP;
  r139: Raf1Star|RKIPP => MEKPP|RKIPP; k139*Raf1Star|RKIPP;
  r140: Raf1Star|RKIPP => RP|RKIPP|RKIPP; k140*Raf1Star|RKIPP;
  r141: Raf1Star|ERKPP => RP|RKIPP|ERKPP; k141*Raf1Star|ERKPP;
  r142: ERKPP|Raf1Star => ERK|Raf1Star; k142*ERKPP|Raf1Star;
  r143: RKIP|ERKPP => ERK|ERKPP; k143*RKIP|ERKPP;
  r144: RKIP|MEKPP => ERK|MEKPP; k144*RKIP|MEKPP;
  r145: Raf1Star|RP => ERK|RP; k145*Raf1Star|RP;
  r146: Raf1Star|RKIP|RKIP => RKIPP|RKIP; k146*Raf1Star|RKIP|RKIP;
  r147: MEKPP|ERK|RP => Raf1Star|RKIP|RP; k147*MEKPP|ERK|RP;
  r148: RP|RKIPP|MEKPP|ERK => Raf1Star|MEKPP|ERK; k148*RP|RKIPP|MEKPP|ERK;
  r149: RP|RKIPP|RKIP => Raf1Star|RKIP; k149*RP|RKIPP|RKIP;
  r150: Raf1Star|RKIP|RKIP => MEKPP|RKIP; k150*Raf1Star|RKIP|RKIP;
  r151: MEKPP|ERK|RP|RKIPP => RKIP|RP|RKIPP; k151*MEKPP|ERK|RP|RKIPP;
  r152: Raf1Star|RKIP|ERKPP|ERK => RKIP|ERK; k152*Raf1Star|RKIP|ERKPP|ERK;
  r153: RKIP|Raf1Star|RKIP => Raf1Star|RKIP|ERKPP|Raf1Star|RKIP; k153*RKIP|Raf1Star|RKIP;
  r154: RP|MEKPP|ERK => Raf1Star|RKIP|MEKPP|ERK; k154*RP|MEKPP|ERK;
  r155: RKIP|RKIPP => ERKPP|RKIPP; k155*RKIP|RKIPP;
  r156: RKIP|RKIPP => RKIP + RKIPP; k156*RKIP|RKIPP;
  r157: ERK|ERKPP => RP|RKIPP|ERKPP; k157*ERK|ERKPP;
  r158: ERK|MEKPP => RP|RKIPP|MEKPP; k158*ERK|MEKPP;
  r159: MEKPP|RKIPP => ERK|RKIPP; k159*MEKPP|RKIPP;
  r160: MEKPP|ERKPP => ERK|ERKPP; k160*MEKPP|ERKPP;
  r161: Raf1Star|RKIP|MEKPP|ERK => Raf1Star|RKIP + MEKPP|ERK; k161*Raf1Star|RKIP|MEKPP|ERK;
  r162: RP|RKIPP|RKIPP => MEKPP|RKIPP; k162*RP|RKIPP|RKIPP;
  r163: RKIPP|RP => MEKPP|ERK|RP; k163*RKIPP|RP;
  r164: RP|RKIPP|ERK => Raf1Star|RKIP|ERK; k164*RP|RKIPP|ERK;
  r165: Raf1Star|RKIP|ERK => MEKPP|ERK; k165*Raf1Star|RKIP|ERK;
  r166: RKIPP|Raf1Star => RP|Raf1Star; k166*RKIPP|Raf1Star;
  r167: RKIPP|RP|RKIPP => RP|RP|RKIPP; k167*RKIPP|RP|RKIPP;
  r168: ERK|MEKPP|ERK => ERKPP|MEKPP|ERK; k168*ERK|MEKPP|ERK;
  r169: ERK|RP => ERKPP|RP; k169*ERK|RP;
  r170: Raf1Star|Raf1Star|RKIP|ERKPP => Raf1Star|RKIP|Raf1Star|RKIP|ERKPP; k170*Raf1Star|Raf1Star|RKIP|ERKPP;
  r171: RP|Raf1Star|RKIP => RKIP|Raf1Star|RKIP; k171*RP|Raf1Star|RKIP;
  r172: Raf1Star|RKIP|ERKPP|RKIPP => MEKPP|RKIPP; k172*Raf1Star|RKIP|ERKPP|RKIPP;
  r173: Raf1Star|RKIP|ERKPP|ERKPP => MEKPP|ERKPP; k173*Raf1Star|RKIP|ERKPP|ERKPP;
  r174: MEKPP|ERKPP => MEKPP + ERKPP; k174*MEKPP|ERKPP;
  r175: RP|RKIPP|Raf1Star => MEKPP|ERK|Raf1Star; k175*RP|RKIPP|Raf1Star;
  r176: ERKPP|Raf1Star|RKIP|ERKPP => RP|RKIPP|Raf1Star|RKIP|ERKPP; k176*ERKPP|Raf1Star|RKIP|ERKPP;
  r177: RKIP|MEKPP => RP|RKIPP|MEKPP; k177*RKIP|MEKPP;
  r178: Raf1Star|RKIP|ERKPP|Raf1Star => Raf1Star|RKIP|ERKPP + Raf1Star; k178*Raf1Star|RKIP|ERKPP|Raf1Star;
  r179: Raf1Star|RKIP|ERKPP|RP|RKIPP => Raf1Star|RKIP|ERKPP + RP|RKIPP; k179*Raf1Star|RKIP|ERKPP|RP|RKIPP;
  r180: RKIP|RKIPP => RP|RKIPP|RKIPP; k180*RKIP|RKIPP;
  r181: ERKPP|RKIPP => MEKPP|RKIPP; k181*ERKPP|RKIPP;
  r182: RKIPP + RP => RKIPP|RP; k182*RKIPP*RP;
  r183: Raf1Star|RP => RP|RKIPP|RP; k183*Raf1Star|RP;
  r184: MEKPP|Raf1Star|RKIP => Raf1Star|Raf1Star|RKIP; k184*MEKPP|Raf1Star|RKIP;
  r185: RP|RKIPP|MEKPP|ERK => Raf1Star|RKIP|ERKPP|MEKPP|ERK; k185*RP|RKIPP|MEKPP|ERK;
  r186: MEKPP|Raf1Star => RKIP|Raf1Star; k186*MEKPP|Raf1Star;
  r187: RP|Raf1Star => RP|RKIPP|Raf1Star; k187*RP|Raf1Star;
  r188: MEKPP|MEKPP|ERK => ERKPP|MEKPP|ERK; k188*MEKPP|MEKPP|ERK;
  r189: ERK|ERKPP => Raf1Star|RKIP|ERKPP; k189*ERK|ERKPP;
  r190: ERK|MEKPP => Raf1Star|RKIP|MEKPP; k190*ERK|MEKPP;
  r191: MEKPP|ERK + RKIP => MEKPP|ERK|RKIP; k191*MEKPP|ERK*RKIP;
  r192: ERK|RKIP => MEKPP|ERK|RKIP; k192*ERK|RKIP;
  r193: Raf1Star|RKIP|RKIP => Raf1Star|RKIP|ERKPP|RKIP; k193*Raf1Star|RKIP|RKIP;
  r194: MEKPP|RP => ERKPP|RP; k194*MEKPP|RP;
  r195: Raf1Star + ERKPP => Raf1Star|ERKPP; k195*Raf1Star*ERKPP;
  r196: Raf1Star + MEKPP => Raf1Star|MEKPP; k196*Raf1Star*MEKPP;
  r197: Raf1Star + RKIPP => Raf1Star|RKIPP; k197*Raf1Star*RKIPP;
  r198: ERKPP|ERK => RKIP|ERK; k198*ERKPP|ERK;
  r199: Raf1Star|RKIP|MEKPP|ERK => RKIPP|MEKPP|ERK; k199*Raf1Star|RKIP|MEKPP|ERK;
  r200: Raf1Star|RKIP|ERKPP|MEKPP|ERK => Raf1Star|RKIP|MEKPP|ERK; k200*Raf1Star|RKIP|ERKPP|MEKPP|ERK;
  r201: ERK|RKIP => RP|RKIPP|RKIP; k201*ERK|RKIP;
  r202: MEKPP|Raf1Star|RKIP|ERKPP => MEKPP + Raf1Star|RKIP|ERKPP; k202*MEKPP|Raf1Star|RKIP|ERKPP;
  r203: ERKPP|MEKPP|ERK => RP|MEKPP|ERK; k203*ERKPP|MEKPP|ERK;
  r204: Raf1Star|RKIPP => RKIP|RKIPP; k204*Raf1Star|RKIPP;
  r205: Raf1Star|ERKPP => RKIP|ERKPP; k205*Raf1Star|ERKPP;
  r206: Raf1Star|Raf1Star|RKIP => RP|RKIPP|Raf1Star|RKIP; k206*Raf1Star|Raf1Star|RKIP;
  r207: RKIP|Raf1Star|RKIP|ERKPP => RP|RKIPP|Raf1Star|RKIP|ERKPP; k207*RKIP|Raf1Star|RKIP|ERKPP;
  r208: RKIPP|ERK => Raf1Star|RKIP|ERK; k208*RKIPP|ERK;
  r209: RKIPP|RKIP => RP|RKIPP|RKIP; k209*RKIPP|RKIP;
  r210: MEKPP + RKIP => MEKPP|RKIP; k210*MEKPP*RKIP;
  r211: RP|ERK => MEKPP|ERK; k211*RP|ERK;
  r212: ERKPP|ERK => RKIPP|ERK; k212*ERKPP|ERK;
  r213: Raf1Star + RKIP => Raf1Star|RKIP; k213*Raf1Star*RKIP;
  r214: MEKPP|ERKPP => RP|ERKPP; k214*MEKPP|ERKPP;
  r215: RKIP|Raf1Star|RKIP|ERKPP => ERKPP|Raf1Star|RKIP|ERKPP; k215*RKIP|Raf1Star|RKIP|ERKPP;
  r216: MEKPP|RP|RKIPP => Raf1Star|RP|RKIPP; k216*MEKPP|RP|RKIPP;
  r217: RKIPP|RKIP => Raf1Star|RKIP; k217*RKIPP|RKIP;
  r218: ERK|Raf1Star|RKIP => ERKPP|Raf1Star|RKIP; k218*ERK|Raf1Star|RKIP;
  r219: MEKPP|RP|RKIPP => MEKPP + RP|RKIPP; k219*MEKPP|RP|RKIPP;
  r220: Raf1Star|Raf1Star|RKIP => RKIP|Raf1Star|RKIP; k220*Raf1Star|Raf1Star|RKIP;
  r221: RP|RP|RKIPP => MEKPP|RP|RKIPP; k221*RP|RP|RKIPP;
  r222: ERKPP|RP|RKIPP => ERKPP + RP|RKIPP; k222*ERKPP|RP|RKIPP;
  r223: RP|Raf1Star|RKIP|ERKPP => Raf1Star|RKIP|Raf1Star|RKIP|ERKPP; k223*RP|Raf1Star|RKIP|ERKPP;
  r224: ERK|MEKPP|ERK => MEKPP|MEKPP|ERK; k224*ERK|MEKPP|ERK;
  r225: RP|ERK => Raf1Star|ERK; k225*RP|ERK;
  r226: RKIPP|Raf1Star|RKIP => Raf1Star|RKIP|ERKPP|Raf1Star|RKIP; k226*RKIPP|Raf1Star|RKIP;
  r227: RP|RKIPP|Raf1Star => ERKPP|Raf1Star; k227*RP|RKIPP|Raf1Star;
  r228: Raf1Star|RKIP|ERKPP|RKIPP => MEKPP|ERK|RKIPP; k228*Raf1Star|RKIP|ERKPP|RKIPP;
  r229: ERK|RKIP => RP|RKIP; k229*ERK|RKIP;
  r230: MEKPP|Raf1Star => ERKPP|Raf1Star; k230*MEKPP|Raf1Star;
  r231: MEKPP|RP|RKIPP => ERKPP|RP|RKIPP; k231*MEKPP|RP|RKIPP;
  r232: MEKPP|ERK|ERKPP => ERK|ERKPP; k232*MEKPP|ERK|ERKPP;
  r233: MEKPP|ERK|MEKPP => ERK|MEKPP; k233*MEKPP|ERK|MEKPP;
  r234: ERK|RKIP => MEKPP|RKIP; k234*ERK|RKIP;
  r235: ERK + MEKPP => ERK|MEKPP; k235*ERK*MEKPP;
  r236: ERK + RKIPP => ERK|RKIPP; k236*ERK*RKIPP;
  r237: ERK + ERKPP => ERK|ERKPP; k237*ERK*ERKPP;
  r238: Raf1Star|ERK => MEKPP|ERK; k238*Raf1Star|ERK;
  r239: RKIP|MEKPP|ERK => RKIP + MEKPP|ERK; k239*RKIP|MEKPP|ERK;
  r240: Raf1Star|RKIPP => RP|RKIPP; k240*Raf1Star|RKIPP;
  r241: Raf1Star|MEKPP => RP|MEKPP; k241*Raf1Star|MEKPP;
  r242: Raf1Star|ERKPP => RP|ERKPP; k242*Raf1Star|ERKPP;
  r243: Raf1Star|MEKPP => ERKPP|MEKPP; k243*Raf1Star|MEKPP;
  r244: RKIP|RP|RKIPP => ERKPP|RP|RKIPP; k244*RKIP|RP|RKIPP;
  r245: RP + RP|RKIPP => RP|RP|RKIPP; k245*RP*RP|RKIPP;
  r246: ERKPP|MEKPP => RP|RKIPP|MEKPP; k246*ERKPP|MEKPP;
  r247: Raf1Star|RKIP|ERKPP|RKIPP => RP|RKIPP; k247*Raf1Star|RKIP|ERKPP|RKIPP;
  r248: Raf1Star + RP|RKIPP => Raf1Star|RP|RKIPP; k248*Raf1Star*RP|RKIPP;
  r249: RP|RKIPP|Raf1Star|RKIP => Raf1Star|RKIP|ERKPP|Raf1Star|RKIP; k249*RP|RKIPP|Raf1Star|RKIP;
  r250: RKIPP|MEKPP|ERK => RKIP|MEKPP|ERK; k250*RKIPP|MEKPP|ERK;
  r251: RKIPP|Raf1Star|RKIP|ERKPP => MEKPP|ERK|Raf1Star|RKIP|ERKPP; k251*RKIPP|Raf1Star|RKIP|ERKPP;
  r252: RKIPP|Raf1Star => RKIP|Raf1Star; k252*RKIPP|Raf1Star;
  r253: ERK|Raf1Star => MEKPP|ERK|Raf1Star; k253*ERK|Raf1Star;
  r254: ERK|RP|RKIPP => MEKPP|ERK|RP|RKIPP; k254*ERK|RP|RKIPP;
  r255: ERKPP|Raf1Star|RKIP => ERKPP + Raf1Star|RKIP; k255*ERKPP|Raf1Star|RKIP;
  r256: Raf1Star|RKIP|ERKPP|RKIP => RP|RKIPP|RKIP; k256*Raf1Star|RKIP|ERKPP|RKIP;
  r257: ERK|Raf1Star|RKIP => RKIP|Raf1Star|RKIP; k257*ERK|Raf1Star|RKIP;
  r258: RP|Raf1Star|RKIP => MEKPP|Raf1Star|RKIP; k258*RP|Raf1Star|RKIP;
  r259: Raf1Star|RP => ERKPP|RP; k259*Raf1Star|RP;
  r260: ERK + Raf1Star => ERK|Raf1Star; k260*ERK*Raf1Star;
  r261: ERK + RP|RKIPP => ERK|RP|RKIPP; k261*ERK*RP|RKIPP;
  r262: RP|Raf1Star|RKIP => MEKPP|ERK|Raf1Star|RKIP; k262*RP|Raf1Star|RKIP;
  r263: RKIPP|RKIP => Raf1Star|RKIP|ERKPP|RKIP; k263*RKIPP|RKIP;
  r264: RKIPP|MEKPP|ERK => RP|RKIPP|MEKPP|ERK; k264*RKIPP|MEKPP|ERK;
  r265: Raf1Star|MEKPP|ERK => RP|RKIPP|MEKPP|ERK; k265*Raf1Star|MEKPP|ERK;
  r266: ERKPP|Raf1Star|RKIP => Raf1Star|Raf1Star|RKIP; k266*ERKPP|Raf1Star|RKIP;
  r267: ERKPP|Raf1Star|RKIP|ERKPP => Raf1Star|RKIP|Raf1Star|RKIP|ERKPP; k267*ERKPP|Raf1Star|RKIP|ERKPP;
  r268: MEKPP|ERK|RP => ERK|RP; k268*MEKPP|ERK|RP;
  r269: RP|RKIPP|RKIPP => Raf1Star|RKIPP; k269*RP|RKIPP|RKIPP;
  r270: RP|RKIPP|Raf1Star|RKIP|ERKPP => RP|Raf1Star|RKIP|ERKPP; k270*RP|RKIPP|Raf1Star|RKIP|ERKPP;
  r271: ERK|MEKPP => RKIP|MEKPP; k271*ERK|MEKPP;
  r272: ERK|RKIPP => RKIP|RKIPP; k272*ERK|RKIPP;
  r273: ERK|ERKPP => RKIP|ERKPP; k273*ERK|ERKPP;
  r274: RP|Raf1Star|RKIP => RKIPP|Raf1Star|RKIP; k274*RP|Raf1Star|RKIP;
  r275: RKIPP|RKIP => RP|RKIP; k275*RKIPP|RKIP;
  r276: RP|RKIPP|Raf1Star|RKIP|ERKPP => MEKPP|Raf1Star|RKIP|ERKPP; k276*RP|RKIPP|Raf1Star|RKIP|ERKPP;
  r277: ERKPP|RP => Raf1Star|RKIP|ERKPP|RP; k277*ERKPP|RP;
  r278: RKIP|RP => RP|RKIPP|RP; k278*RKIP|RP;
  r279: Raf1Star|RKIP|ERK => Raf1Star|RKIP|ERKPP|ERK; k279*Raf1Star|RKIP|ERK;
  r280: RP|RKIPP + Raf1Star|RKIP => RP|RKIPP|Raf1Star|RKIP; k280*RP|RKIPP*Raf1Star|RKIP;
  r281: Raf1Star|RKIP|ERK => RP|RKIPP|ERK; k281*Raf1Star|RKIP|ERK;
  r282: ERK|RP => Raf1Star|RKIP|ERKPP|RP; k282*ERK|RP;
  r283: RP|MEKPP|ERK => Raf1Star|RKIP|ERKPP|MEKPP|ERK; k283*RP|MEKPP|ERK;
  r284: Raf1Star|RKIP + MEKPP|ERK => Raf1Star|RKIP|MEKPP|ERK; k284*Raf1Star|RKIP*MEKPP|ERK;
  r285: Raf1Star|RKIP + ERK => Raf1Star|RKIP|ERK; k285*Raf1Star|RKIP*ERK;
  r286: RP|RKIPP|ERKPP => ERK|ERKPP; k286*RP|RKIPP|ERKPP;
  r287: RP|RKIPP|RKIPP => ERK|RKIPP; k287*RP|RKIPP|RKIPP;
  r288: ERK|ERKPP => MEKPP|ERKPP; k288*ERK|ERKPP;
  r289: Raf1Star|RP|RKIPP => RP|RP|RKIPP; k289*Raf1Star|RP|RKIPP;
  r290: RKIP + ERKPP => RKIP|ERKPP; k290*RKIP*ERKPP;
  r291: RKIP + MEKPP => RKIP|MEKPP; k291*RKIP*MEKPP;
  r292: ERK + Raf1Star|RKIP => ERK|Raf1Star|RKIP; k292*ERK*Raf1Star|RKIP;
  r293: RKIP|ERK => MEKPP|ERK; k293*RKIP|ERK;
  r294: ERKPP|RKIP => RP|RKIP; k294*ERKPP|RKIP;
  r295: RKIPP|RKIP => Raf1Star|RKIP|RKIP; k295*RKIPP|RKIP;
  r296: Raf1Star|RP => RKIP|RP; k296*Raf1Star|RP;
  r297: Raf1Star|RKIP|ERKPP|Raf1Star|RKIP => RKIP|Raf1Star|RKIP; k297*Raf1Star|RKIP|ERKPP|Raf1Star|RKIP;
  r298: RKIP|ERK => Raf1Star|RKIP|ERKPP|ERK; k298*RKIP|ERK;
  r299: Raf1Star|RKIP|ERKPP|MEKPP|ERK => RP|RKIPP|MEKPP|ERK; k299*Raf1Star|RKIP|ERKPP|MEKPP|ERK;
  r300: RKIPP|Raf1Star|RKIP|ERKPP => RP|RKIPP|Raf1Star|RKIP|ERKPP; k300*RKIPP|Raf1Star|RKIP|ERKPP;
  r301: Raf1Star|RKIPP => ERK|RKIPP; k301*Raf1Star|RKIPP;
  r302: RKIPP|Raf1Star|RKIP => RP|RKIPP|Raf1Star|RKIP; k302*RKIPP|Raf1Star|RKIP;
  r303: Raf1Star|RKIP|ERKPP + Raf1Star => Raf1Star|RKIP|ERKPP|Raf1Star; k303*Raf1Star|RKIP|ERKPP*Raf1Star;
  r304: RP|RKIPP|RKIPP => RKIP|RKIPP; k304*RP|RKIPP|RKIPP;
  r305: RP|RKIPP|MEKPP => RKIP|MEKPP; k305*RP|RKIPP|MEKPP;
  r306: RP|RKIPP|ERKPP => RKIP|ERKPP; k306*RP|RKIPP|ERKPP;
  r307: ERKPP|MEKPP|ERK => RP|RKIPP|MEKPP|ERK; k307*ERKPP|MEKPP|ERK;
  r308: MEKPP|RKIPP => Raf1Star|RKIP|ERKPP|RKIPP; k308*MEKPP|RKIPP;
  r309: Raf1Star|RP => MEKPP|RP; k309*Raf1Star|RP;
  r310: Raf1Star|Raf1Star|RKIP => Raf1Star|RKIP|ERKPP|Raf1Star|RKIP; k310*Raf1Star|Raf1Star|RKIP;
  r311: MEKPP|Raf1Star|RKIP => Raf1Star|RKIP|ERKPP|Raf1Star|RKIP; k311*MEKPP|Raf1Star|RKIP;
  r312: Raf1Star|Raf1Star|RKIP|ERKPP => MEKPP|Raf1Star|RKIP|ERKPP; k312*Raf1Star|Raf1Star|RKIP|ERKPP;
  r313: RKIP|ERK => ERKPP|ERK; k313*RKIP|ERK;
  r314: ERK|MEKPP|ERK => RP|RKIPP|MEKPP|ERK; k314*ERK|MEKPP|ERK;
  r315: Raf1Star|RKIP|RP => Raf1Star|RKIP|ERKPP|RP; k315*Raf1Star|RKIP|RP;
  r316: Raf1Star|RKIP|ERKPP|RKIP => Raf1Star|RKIP|RKIP; k316*Raf1Star|RKIP|ERKPP|RKIP;
  r317: RP|RKIPP|Raf1Star => RP|Raf1Star; k317*RP|RKIPP|Raf1Star;
  r318: ERKPP|MEKPP|ERK => MEKPP|MEKPP|ERK; k318*ERKPP|MEKPP|ERK;
  r319: MEKPP|RP => ERK|RP; k319*MEKPP|RP;
  r320: ERKPP|Raf1Star|RKIP => ERK|Raf1Star|RKIP; k320*ERKPP|Raf1Star|RKIP;
  r321: RP|RKIPP|ERK => Raf1Star|RKIP|ERKPP|ERK; k321*RP|RKIPP|ERK;
  r322: Raf1Star|RKIP|ERKPP|RKIP => MEKPP|RKIP; k322*Raf1Star|RKIP|ERKPP|RKIP;
  r323: RKIP + Raf1Star => RKIP|Raf1Star; k323*RKIP*Raf1Star;
  r324: MEKPP + Raf1Star => MEKPP|Raf1Star; k324*MEKPP*Raf1Star;
  r325: RP|RKIPP|Raf1Star => RKIP|Raf1Star; k325*RP|RKIPP|Raf1Star;
  r326: ERKPP|Raf1Star|RKIP|ERKPP => RKIP|Raf1Star|RKIP|ERKPP; k326*ERKPP|Raf1Star|RKIP|ERKPP;
  r327: RP|ERK => RP|RKIPP|ERK; k327*RP|ERK;
  r328: MEKPP|Raf1Star|RKIP => MEKPP + Raf1Star|RKIP; k328*MEKPP|Raf1Star|RKIP;
  r329: RP|RKIPP|RP => RP|RKIPP + RP; k329*RP|RKIPP|RP;
  r330: RKIP|RP => MEKPP|ERK|RP; k330*RKIP|RP;
  r331: RKIP|RKIPP => Raf1Star|RKIPP; k331*RKIP|RKIPP;
  r332: RKIP|MEKPP => Raf1Star|MEKPP; k332*RKIP|MEKPP;
  r333: RP|RKIPP|RKIP => RKIPP|RKIP; k333*RP|RKIPP|RKIP;
  r334: RP|RKIPP|RKIP => ERK|RKIP; k334*RP|RKIPP|RKIP;
  r335: Raf1Star|RKIP|ERKPP|RKIP => RP|RKIP; k335*Raf1Star|RKIP|ERKPP|RKIP;
  r336: MEKPP|MEKPP|ERK => RP|RKIPP|MEKPP|ERK; k336*MEKPP|MEKPP|ERK;
  r337: Raf1Star|Raf1Star|RKIP|ERKPP => ERK|Raf1Star|RKIP|ERKPP; k337*Raf1Star|Raf1Star|RKIP|ERKPP;
  r338: Raf1Star|RKIP + RKIP => Raf1Star|RKIP|RKIP; k338*Raf1Star|RKIP*RKIP;
  r339: ERK|ERKPP => MEKPP|ERK|ERKPP; k339*ERK|ERKPP;
  r340: ERK|RKIPP => MEKPP|ERK|RKIPP; k340*ERK|RKIPP;
  r341: ERK|MEKPP => MEKPP|ERK|MEKPP; k341*ERK|MEKPP;
  r342: Raf1Star|RKIP|RKIP => MEKPP|ERK|RKIP; k342*Raf1Star|RKIP|RKIP;
  r343: Raf1Star + RP => Raf1Star|RP; k343*Raf1Star*RP;
  r344: ERKPP|ERK => MEKPP|ERK; k344*ERKPP|ERK;
  r345: MEKPP|ERK|RKIPP => Raf1Star|RKIP|ERKPP|RKIPP; k345*MEKPP|ERK|RKIPP;
  r346: ERKPP|MEKPP|ERK => ERK|MEKPP|ERK; k346*ERKPP|MEKPP|ERK;
  r347: MEKPP|ERK|MEKPP => Raf1Star|RKIP|ERKPP|MEKPP; k347*MEKPP|ERK|MEKPP;
  r348: MEKPP|ERK|ERKPP => Raf1Star|RKIP|ERKPP|ERKPP; k348*MEKPP|ERK|ERKPP;
  r349: ERK|MEKPP|ERK => Raf1Star|RKIP|MEKPP|ERK; k349*ERK|MEKPP|ERK;
  r350: MEKPP|ERK|MEKPP => ERKPP|MEKPP; k350*MEKPP|ERK|MEKPP;
  r351: Raf1Star|RKIP|ERKPP|Raf1Star => ERK|Raf1Star; k351*Raf1Star|RKIP|ERKPP|Raf1Star;
  r352: MEKPP|ERK + Raf1Star => MEKPP|ERK|Raf1Star; k352*MEKPP|ERK*Raf1Star;
  r353: ERKPP + Raf1Star => ERKPP|Raf1Star; k353*ERKPP*Raf1Star;
  r354: MEKPP|RP|RKIPP => MEKPP|ERK|RP|RKIPP; k354*MEKPP|RP|RKIPP;
  r355: RKIP|Raf1Star|RKIP => Raf1Star|Raf1Star|RKIP; k355*RKIP|Raf1Star|RKIP;
  r356: MEKPP|ERK|ERK => MEKPP|ERK; k356*MEKPP|ERK|ERK;
  r357: Raf1Star|ERK => RP|RKIPP|ERK; k357*Raf1Star|ERK;
  r358: RKIPP|RP|RKIPP => Raf1Star|RP|RKIPP; k358*RKIPP|RP|RKIPP;
  r359: ERKPP|MEKPP => Raf1Star|RKIP|ERKPP|MEKPP; k359*ERKPP|MEKPP;
  r360: Raf1Star|Raf1Star|RKIP|ERKPP => RKIP|Raf1Star|RKIP|ERKPP; k360*Raf1Star|Raf1Star|RKIP|ERKPP;
  r361: Raf1Star|RKIP|ERKPP + Raf1Star|RKIP => Raf1Star|RKIP|ERKPP|Raf1Star|RKIP; k361*Raf1Star|RKIP|ERKPP*Raf1Star|RKIP;
  r362: RKIPP|MEKPP => RKIP|MEKPP; k362*RKIPP|MEKPP;
  r363: Raf1Star|Raf1Star|RKIP|ERKPP => ERKPP|Raf1Star|RKIP|ERKPP; k363*Raf1Star|Raf1Star|RKIP|ERKPP;
  r364: Raf1Star|RKIP|MEKPP|ERK => MEKPP|MEKPP|ERK; k364*Raf1Star|RKIP|MEKPP|ERK;
  r365: RKIPP|Raf1Star|RKIP|ERKPP => Raf1Star|Raf1Star|RKIP|ERKPP; k365*RKIPP|Raf1Star|RKIP|ERKPP;
  r366: RP|Raf1Star|RKIP => RP + Raf1Star|RKIP; k366*RP|Raf1Star|RKIP;
  r367: ERKPP|RKIPP => Raf1Star|RKIPP; k367*ERKPP|RKIPP;
  r368: RP|MEKPP => Raf1Star|RKIP|ERKPP|MEKPP; k368*RP|MEKPP;
  r369: RP|RKIPP|Raf1Star => Raf1Star|RKIP|Raf1Star; k369*RP|RKIPP|Raf1Star;
  r370: RKIP + MEKPP|ERK => RKIP|MEKPP|ERK; k370*RKIP*MEKPP|ERK;
  r371: RP|RKIPP => Raf1Star|RKIPP; k371*RP|RKIPP;
  r372: ERK|RP|RKIPP => ERK + RP|RKIPP; k372*ERK|RP|RKIPP;
  r373: RP|Raf1Star|RKIP|ERKPP => RKIPP|Raf1Star|RKIP|ERKPP; k373*RP|Raf1Star|RKIP|ERKPP;
  r374: Raf1Star|RKIP|RP => Raf1Star|RKIP + RP; k374*Raf1Star|RKIP|RP;
  r375: RKIP|Raf1Star|RKIP => ERK|Raf1Star|RKIP; k375*RKIP|Raf1Star|RKIP;
  r376: ERKPP + Raf1Star|RKIP => ERKPP|Raf1Star|RKIP; k376*ERKPP*Raf1Star|RKIP;
  r377: RKIP|RP|RKIPP => RKIPP|RP|RKIPP; k377*RKIP|RP|RKIPP;
  r378: RKIP|Raf1Star => RKIPP|Raf1Star; k378*RKIP|Raf1Star;
  r379: RP|RKIPP|Raf1Star => ERK|Raf1Star; k379*RP|RKIPP|Raf1Star;
  r380: MEKPP|ERK|Raf1Star|RKIP|ERKPP => RKIPP|Raf1Star|RKIP|ERKPP; k380*MEKPP|ERK|Raf1Star|RKIP|ERKPP;
  r381: ERK|Raf1Star => ERKPP|Raf1Star; k381*ERK|Raf1Star;
  r382: RP|RP|RKIPP => Raf1Star|RKIP|RP|RKIPP; k382*RP|RP|RKIPP;
  r383: Raf1Star|RKIP|ERKPP|Raf1Star|RKIP => RP|RKIPP|Raf1Star|RKIP; k383*Raf1Star|RKIP|ERKPP|Raf1Star|RKIP;
  r384: RP|Raf1Star => Raf1Star|RKIP|Raf1Star; k384*RP|Raf1Star;
  r385: ERK + MEKPP|ERK => ERK|MEKPP|ERK; k385*ERK*MEKPP|ERK;
  r386: Raf1Star|RKIP|ERKPP|ERKPP => Raf1Star|ERKPP; k386*Raf1Star|RKIP|ERKPP|ERKPP;
  r387: ERKPP + Raf1Star|RKIP|ERKPP => ERKPP|Raf1Star|RKIP|ERKPP; k387*ERKPP*Raf1Star|RKIP|ERKPP;
  r388: MEKPP|ERK|RKIPP => RP|RKIPP; k388*MEKPP|ERK|RKIPP;
  r389: MEKPP|ERK|MEKPP => RP|MEKPP; k389*MEKPP|ERK|MEKPP;
  r390: Raf1Star|RKIP|MEKPP => ERKPP|MEKPP; k390*Raf1Star|RKIP|MEKPP;
  r391: RP|RKIPP|MEKPP => MEKPP|ERK|MEKPP; k391*RP|RKIPP|MEKPP;
  r392: RP|RKIPP|ERKPP => MEKPP|ERK|ERKPP; k392*RP|RKIPP|ERKPP;
  r393: RP|RKIPP|RKIPP => MEKPP|ERK|RKIPP; k393*RP|RKIPP|RKIPP;
  r394: MEKPP|Raf1Star|RKIP => RP|RKIPP|Raf1Star|RKIP; k394*MEKPP|Raf1Star|RKIP;
  r395: MEKPP|Raf1Star|RKIP|ERKPP => RKIPP|Raf1Star|RKIP|ERKPP; k395*MEKPP|Raf1Star|RKIP|ERKPP;
  r396: MEKPP|ERK|RP => Raf1Star|RKIP|ERKPP|RP; k396*MEKPP|ERK|RP;
  r397: ERKPP|RP|RKIPP => Raf1Star|RKIP|ERKPP|RP|RKIPP; k397*ERKPP|RP|RKIPP;
  r398: RP|RKIPP|MEKPP => Raf1Star|RKIP|ERKPP|MEKPP; k398*RP|RKIPP|MEKPP;
  r399: RP + ERKPP => RP|ERKPP; k399*RP*ERKPP;
  r400: RP + RKIPP => RP|RKIPP; k400*RP*RKIPP;
  r401: Raf1Star|RKIP|ERKPP|MEKPP|ERK => MEKPP|MEKPP|ERK; k401*Raf1Star|RKIP|ERKPP|MEKPP|ERK;
  r402: RKIPP|RP|RKIPP => MEKPP|ERK|RP|RKIPP; k402*RKIPP|RP|RKIPP;
  r403: RKIPP|Raf1Star => MEKPP|ERK|Raf1Star; k403*RKIPP|Raf1Star;
  r404: RP|ERK => Raf1Star|RKIP|ERKPP|ERK; k404*RP|ERK;
  r405: Raf1Star|RKIP|ERKPP|Raf1Star => Raf1Star|RKIP|Raf1Star; k405*Raf1Star|RKIP|ERKPP|Raf1Star;
  r406: RP|RKIPP|ERK => MEKPP|ERK; k406*RP|RKIPP|ERK;
  r407: Raf1Star + Raf1Star|RKIP|ERKPP => Raf1Star|Raf1Star|RKIP|ERKPP; k407*Raf1Star*Raf1Star|RKIP|ERKPP;
  r408: ERK|MEKPP => ERKPP|MEKPP; k408*ERK|MEKPP;
  r409: Raf1Star|RKIP|RKIPP => RKIP|RKIPP; k409*Raf1Star|RKIP|RKIPP;
  r410: Raf1Star|RP => MEKPP|ERK|RP; k410*Raf1Star|RP;
  r411: Raf1Star|RKIP|MEKPP => RKIP|MEKPP; k411*Raf1Star|RKIP|MEKPP;
  r412: RP|RKIPP|RP => ERK|RP; k412*RP|RKIPP|RP;
  r413: Raf1Star|RKIP|RP|RKIPP => Raf1Star|RKIP + RP|RKIPP; k413*Raf1Star|RKIP|RP|RKIPP;
  r414: Raf1Star|RKIP|RKIPP => MEKPP|RKIPP; k414*Raf1Star|RKIP|RKIPP;
  r415: RP|RKIPP|ERK => ERKPP|ERK; k415*RP|RKIPP|ERK;
  r416: MEKPP|RP => RKIP|RP; k416*MEKPP|RP;
  r417: RKIP|ERK => MEKPP|ERK|ERK; k417*RKIP|ERK;
  r418: RP|Raf1Star|RKIP|ERKPP => RP + Raf1Star|RKIP|ERKPP; k418*RP|Raf1Star|RKIP|ERKPP;
  r419: RKIP|ERKPP => Raf1Star|RKIP|ERKPP|ERKPP; k419*RKIP|ERKPP;
  r420: RP|RKIPP|MEKPP|ERK => RP|RKIPP + MEKPP|ERK; k420*RP|RKIPP|MEKPP|ERK;
  r421: RP|RKIPP|Raf1Star|RKIP => RP|Raf1Star|RKIP; k421*RP|RKIPP|Raf1Star|RKIP;
  r422: RP|MEKPP|ERK => RP|RKIPP|MEKPP|ERK; k422*RP|MEKPP|ERK;
  r423: Raf1Star|RKIP|RKIPP => RP|RKIPP|RKIPP; k423*Raf1Star|RKIP|RKIPP;
  r424: MEKPP|ERK|Raf1Star|RKIP|ERKPP => RP|Raf1Star|RKIP|ERKPP; k424*MEKPP|ERK|Raf1Star|RKIP|ERKPP;
  r425: Raf1Star|RKIP|ERKPP|ERK => MEKPP|ERK; k425*Raf1Star|RKIP|ERKPP|ERK;
  r426: ERKPP|Raf1Star => RKIPP|Raf1Star; k426*ERKPP|Raf1Star;
  r427: RP|RKIP => Raf1Star|RKIP; k427*RP|RKIP;
  r428: MEKPP|ERK|MEKPP => Raf1Star|MEKPP; k428*MEKPP|ERK|MEKPP;
  r429: RP|RKIPP|MEKPP => RP|MEKPP; k429*RP|RKIPP|MEKPP;
  r430: RP|RKIPP|ERKPP => RP|ERKPP; k430*RP|RKIPP|ERKPP;
  r431: ERKPP|RP|RKIPP => MEKPP|ERK|RP|RKIPP; k431*ERKPP|RP|RKIPP;
  r432: RP|RKIPP|RKIPP => RP|RKIPP; k432*RP|RKIPP|RKIPP;
  r433: MEKPP|ERK|ERKPP => Raf1Star|ERKPP; k433*MEKPP|ERK|ERKPP;
  r434: RKIP|Raf1Star|RKIP|ERKPP => MEKPP|ERK|Raf1Star|RKIP|ERKPP; k434*RKIP|Raf1Star|RKIP|ERKPP;
  r435: RP|RKIP => MEKPP|RKIP; k435*RP|RKIP;
  r436: RKIPP|MEKPP|ERK => Raf1Star|RKIP|ERKPP|MEKPP|ERK; k436*RKIPP|MEKPP|ERK;
  r437: ERKPP + ERK => ERKPP|ERK; k437*ERKPP*ERK;
  r438: RKIP + Raf1Star|RKIP|ERKPP => RKIP|Raf1Star|RKIP|ERKPP; k438*RKIP*Raf1Star|RKIP|ERKPP;
  r439: MEKPP|RP => MEKPP|ERK|RP; k439*MEKPP|RP;
  r440: MEKPP|ERK|Raf1Star|RKIP|ERKPP => Raf1Star|RKIP|Raf1Star|RKIP|ERKPP; k440*MEKPP|ERK|Raf1Star|RKIP|ERKPP;
  r441: RP|RKIPP + Raf1Star|RKIP|ERKPP => RP|RKIPP|Raf1Star|RKIP|ERKPP; k441*RP|RKIPP*Raf1Star|RKIP|ERKPP;
  r442: RKIP|RP => ERK|RP; k442*RKIP|RP;
  r443: MEKPP|ERK|ERKPP => RKIPP|ERKPP; k443*MEKPP|ERK|ERKPP;
  r444: MEKPP|ERK|MEKPP => RKIPP|MEKPP; k444*MEKPP|ERK|MEKPP;
  r445: Raf1Star|RKIP|ERKPP|MEKPP => Raf1Star|RKIP|ERKPP + MEKPP; k445*Raf1Star|RKIP|ERKPP|MEKPP;
  r446: RKIP|Raf1Star|RKIP => MEKPP|ERK|Raf1Star|RKIP; k446*RKIP|Raf1Star|RKIP;
  r447: Raf1Star|RKIP|RKIPP => RP|RKIPP; k447*Raf1Star|RKIP|RKIPP;
  r448: MEKPP|ERK|Raf1Star|RKIP|ERKPP => ERKPP|Raf1Star|RKIP|ERKPP; k448*MEKPP|ERK|Raf1Star|RKIP|ERKPP;
  r449: RP|RKIPP|Raf1Star|RKIP => RKIP|Raf1Star|RKIP; k449*RP|RKIPP|Raf1Star|RKIP;
  r450: RKIPP|MEKPP => Raf1Star|RKIP|ERKPP|MEKPP; k450*RKIPP|MEKPP;
  r451: RKIPP|ERKPP => Raf1Star|RKIP|ERKPP|ERKPP; k451*RKIPP|ERKPP;
  r452: MEKPP|RKIP => RP|RKIPP|RKIP; k452*MEKPP|RKIP;
  r453: MEKPP|ERK|ERKPP => Raf1Star|RKIP|ERKPP; k453*MEKPP|ERK|ERKPP;
  r454: RKIPP|ERK => RP|RKIPP|ERK; k454*RKIPP|ERK;
  r455: ERKPP|RKIP => MEKPP|ERK|RKIP; k455*ERKPP|RKIP;
  r456: MEKPP|ERK + MEKPP => MEKPP|ERK|MEKPP; k456*MEKPP|ERK*MEKPP;
  r457: ERK + Raf1Star|RKIP|ERKPP => ERK|Raf1Star|RKIP|ERKPP; k457*ERK*Raf1Star|RKIP|ERKPP;
  r458: RKIP|RP|RKIPP => Raf1Star|RKIP|RP|RKIPP; k458*RKIP|RP|RKIPP;
  r459: Raf1Star|RKIP|RKIP => ERKPP|RKIP; k459*Raf1Star|RKIP|RKIP;
  r460: RKIPP|ERKPP => RP|ERKPP; k460*RKIPP|ERKPP;
  r461: Raf1Star + ERK => Raf1Star|ERK; k461*Raf1Star*ERK;
  r462: RKIPP|RP|RKIPP => Raf1Star|RKIP|RP|RKIPP; k462*RKIPP|RP|RKIPP;
  r463: Raf1Star|RKIP|MEKPP => RKIPP|MEKPP; k463*Raf1Star|RKIP|MEKPP;
  r464: Raf1Star|MEKPP|ERK => ERKPP|MEKPP|ERK; k464*Raf1Star|MEKPP|ERK;
  r465: RP|Raf1Star|RKIP|ERKPP => Raf1Star|Raf1Star|RKIP|ERKPP; k465*RP|Raf1Star|RKIP|ERKPP;
  r466: RP|ERK => RKIP|ERK; k466*RP|ERK;
  r467: RKIPP|RP => MEKPP|RP; k467*RKIPP|RP;
  r468: ERK|ERKPP => RKIPP|ERKPP; k468*ERK|ERKPP;
  r469: Raf1Star|RKIP|RP => ERKPP|RP; k469*Raf1Star|RKIP|RP;
  r470: MEKPP|RP => Raf1Star|RKIP|RP; k470*MEKPP|RP;
  r471: RKIPP|Raf1Star|RKIP|ERKPP => RKIP|Raf1Star|RKIP|ERKPP; k471*RKIPP|Raf1Star|RKIP|ERKPP;
  r472: ERKPP|RP|RKIPP => RP|RP|RKIPP; k472*ERKPP|RP|RKIPP;
  r473: ERKPP|Raf1Star => RP|Raf1Star; k473*ERKPP|Raf1Star;
  r474: Raf1Star|RKIP|ERKPP|ERK => ERKPP|ERK; k474*Raf1Star|RKIP|ERKPP|ERK;
  r475: RP|RKIPP + RKIPP => RP|RKIPP|RKIPP; k475*RP|RKIPP*RKIPP;
  r476: RP|RKIPP + MEKPP => RP|RKIPP|MEKPP; k476*RP|RKIPP*MEKPP;
  r477: RP|ERK => ERKPP|ERK; k477*RP|ERK;
  r478: RKIPP|RP => Raf1Star|RKIP|RP; k478*RKIPP|RP;
  r479: RP|ERK => RP + ERK; k479*RP|ERK;
  r480: ERK|Raf1Star|RKIP => RKIPP|Raf1Star|RKIP; k480*ERK|Raf1Star|RKIP;
  r481: MEKPP|RP|RKIPP => Raf1Star|RKIP|RP|RKIPP; k481*MEKPP|RP|RKIPP;
  r482: MEKPP|Raf1Star => Raf1Star|RKIP|Raf1Star; k482*MEKPP|Raf1Star;
  r483: Raf1Star|RKIP|RKIPP => Raf1Star|RKIPP; k483*Raf1Star|RKIP|RKIPP;
  r484: ERK|ERKPP => Raf1Star|RKIP|ERKPP|ERKPP; k484*ERK|ERKPP;
  r485: RKIPP|MEKPP => Raf1Star|MEKPP; k485*RKIPP|MEKPP;
  r486: MEKPP + ERK => MEKPP|ERK; k486*MEKPP*ERK;
  r487: Raf1Star|RKIP|ERK => RKIP|ERK; k487*Raf1Star|RKIP|ERK;
  r488: Raf1Star|RKIP|RKIPP => Raf1Star|RKIP + RKIPP; k488*Raf1Star|RKIP|RKIPP;
  r489: Raf1Star|RP|RKIPP => Raf1Star|RKIP|ERKPP|RP|RKIPP; k489*Raf1Star|RP|RKIPP;
  r490: MEKPP|ERK|Raf1Star|RKIP => RP|RKIPP|Raf1Star|RKIP; k490*MEKPP|ERK|Raf1Star|RKIP;
  r491: ERK|MEKPP|ERK => RKIP|MEKPP|ERK; k491*ERK|MEKPP|ERK;
  r492: MEKPP|Raf1Star|RKIP|ERKPP => ERK|Raf1Star|RKIP|ERKPP; k492*MEKPP|Raf1Star|RKIP|ERKPP;
  r493: ERKPP|RP => ERKPP + RP; k493*ERKPP|RP;
  r494: ERKPP|MEKPP|ERK => RKIPP|MEKPP|ERK; k494*ERKPP|MEKPP|ERK;
  r495: ERK|RP => RKIPP|RP; k495*ERK|RP;
  r496: RKIPP|Raf1Star => RKIPP + Raf1Star; k496*RKIPP|Raf1Star;
  r497: ERKPP|MEKPP => RP|MEKPP; k497*ERKPP|MEKPP;
  r498: ERK|MEKPP => RP|MEKPP; k498*ERK|MEKPP;
  r499: ERK|ERKPP => RP|ERKPP; k499*ERK|ERKPP;
  r500: RP|ERK => Raf1Star|RKIP|ERK; k500*RP|ERK;
  r501: ERKPP|Raf1Star|RKIP|ERKPP => ERK|Raf1Star|RKIP|ERKPP; k501*ERKPP|Raf1Star|RKIP|ERKPP;
  r502: Raf1Star|MEKPP|ERK => Raf1Star|RKIP|ERKPP|MEKPP|ERK; k502*Raf1Star|MEKPP|ERK;
  r503: RP|RKIPP|ERKPP => MEKPP|ERKPP; k503*RP|RKIPP|ERKPP;
  r504: Raf1Star|RKIP|RP|RKIPP => RP|RP|RKIPP; k504*Raf1Star|RKIP|RP|RKIPP;
  r505: Raf1Star|RP|RKIPP => MEKPP|RP|RKIPP; k505*Raf1Star|RP|RKIPP;
  r506: RP|RKIPP|Raf1Star => RP|RKIPP + Raf1Star; k506*RP|RKIPP|Raf1Star;
  r507: MEKPP|ERK|RP|RKIPP => Raf1Star|RKIP|RP|RKIPP; k507*MEKPP|ERK|RP|RKIPP;
  r508: ERK|RKIPP => RP|RKIPP|RKIPP; k508*ERK|RKIPP;
end
